// SBML level 3 version 1

model main()
  // model units - time: second, extent: mole

  // Compartments:
  compartment comp = 1e-14 litre;

  // Species:
  species E in comp = 5e-21/comp;  // substance in mole
  species S in comp = 1e-20/comp;  // substance in mole
  species P in comp = 0;  // substance in mole
  species ES in comp = 0;  // substance in mole

  // Parameters:
  veq_koff = 0.2 per_second;
  veq_kon = 1000000 litre_per_mole_second;
  vcat_kcat = 0.1 per_second;

  // Reactions:
  veq: E + S -> ES; comp*(veq_kon*E*S - veq_koff*ES);
  vcat: ES => E + P; comp*vcat_kcat*ES;

  // Unit definitions:
  unit per_second = 1 / second;
  unit litre_per_mole_second = litre / (mole * second);
end
